// SBML level 3 version 1

model main()
  // model units - substance: nM, time: ms, extent: mole

  // Compartments:
  compartment c1 = 1 litre;
  compartment compartment = 5e-16 litre;

  // Species:
  species ERK in compartment = 129.405;
  species pERK in compartment = 43.433;
  species ppERK in compartment = 14.527;
  species MKP1 in compartment = 27.931;
  species pERKMKP1 in compartment = 9.11;
  species ppERKMKP1 in compartment = 3.046;
  species ppMEKERK in compartment = 119.912;
  species ppMEKpERK in compartment = 40.567;
  species MEK in compartment = 257.476;
  species pMEK in compartment = 104.744;
  species ppMEK in compartment = 43.428;
  species PP2A in compartment = 544.803;
  species pMEKPP2A in compartment = 3.675;
  species ppMEKPP2A in compartment = 1.511;
  species bRaf in compartment = 157.614;
  species bRafRap1MEK in compartment = 36.475;
  species bRafRap1pMEK in compartment = 14.797;
  species bRafRap1 in compartment = 22.6;
  species Raf1Rap1 in compartment = 4.546;
  species Rap1GTP in compartment = 2.391;
  species Rap1GDP in compartment = 300.166;
  species Epac in compartment = 775.345;
  species EpacRap1 in compartment = 5.498;
  species EpacAMP in compartment = 18.911;
  species cAMP in compartment = 28.693;
  species PDE2 in compartment = 159.983;
  species PDE2cAMP in compartment = 0.164;
  species PDE2cAMP2 in compartment = 0.003;
  species PDE4 in compartment = 99.306;
  species PDE4cAMP in compartment = 0.716;
  species AMP in compartment = 71559.297;
  species PKAcAMP2 in compartment = 119.578;
  species PKAcAMP4 in compartment = 1.904;
  species PKA in compartment = 994.494;
  species PKAc in compartment = 0;
  species PKAr in compartment = 0;
  species Src in compartment = 17.134;
  species PKAcSrc in compartment = 2.04;
  species pSrc in compartment = 0.405;
  species Cbl in compartment = 487.524;
  species CblpSrc in compartment = 0.4;
  species pCbl in compartment = 0.157;
  species CRKC3G in compartment = 488.081;
  species CRKC3GpCbl in compartment = 0.372;
  species CRKC3GpCblRap1 in compartment = 11.46;
  species Rap1SynGap in compartment = 1.898;
  species Rap1pSynGap in compartment = 0.001;
  species rap1Gap in compartment = 11.904;
  species Rap1GTPGap in compartment = 0.031;
  species SynGap in compartment = 986.516;
  species pSynGap in compartment = 1.02;
  species pSynden in compartment = 0.91;
  species CK in compartment = 19891.108;
  species CKp in compartment = 0;
  species CamCa4 in compartment = 1.109;
  species CKCamCa4 in compartment = 147.062;
  species CKpCamCa4 in compartment = 0.291;
  species CKpCamCa4SynGap in compartment = 1.512;
  species PP1 in compartment = 3099.988;
  species CKpPP1 in compartment = 0;
  species CKpCamCa4PP1 in compartment = 0.071;
  species Ip35 in compartment = 0.17;
  species Ip35PP1 in compartment = 499.872;
  species Ng in compartment = 2623.125;
  species NgCam in compartment = 18376.917;
  species Gbg in compartment = 0;
  species SrcGbg in compartment = 0;
  species Grb2 in compartment = 906.792;
  species Sos in compartment = 6.793;
  species pSos in compartment = 0;
  species Grb2Sos in compartment = 93.164;
  species ppERKpShcGrb2Sos in compartment = 0;
  species pShcGrb2 in compartment = 0;
  species SrcGbgShc in compartment = 0;
  species Shc in compartment = 499.978;
  species pShc in compartment = 0;
  species pShcGrb2Sos in compartment = 0;
  species pShcGrb2SosRas in compartment = 0;
  species RasGRF in compartment = 428.529;
  species CamCa4GRF in compartment = 31.183;
  species CamCa4GRFRas in compartment = 140.287;
  species Raf1 in compartment = 160.935;
  species Raf1Ras in compartment = 106.258;
  species dRaf1Ras in compartment = 4.296;
  species dRaf1RasMEK in compartment = 7.022;
  species dRaf1RaspMEK in compartment = 2.78;
  species bRafRas in compartment = 20.924;
  species bRafRasMEK in compartment = 33.781;
  species bRafRaspMEK in compartment = 13.809;
  species RasGTP in compartment = 10.948;
  species RasGDP in compartment = 237.074;
  species RasSynGap in compartment = 8.345;
  species rasGap in compartment = 9.82;
  species RasGTPGap in compartment = 0.104;
  species RaspSynGap in compartment = 0.009;
  species Ca in compartment = 43.463;
  species Caext in compartment = 1000334;
  species CaextLeak in compartment = 698.938;
  species Leak in compartment = 1.018;
  species pmca in compartment = 415.068;
  species ncx in compartment = 1917.285;
  species pmcaCa in compartment = 84.91;
  species ncxCa in compartment = 82.757;
  species Calbin in compartment = 150679.075;
  species CalbinC in compartment = 9320.907;
  species CB in compartment = 2997403;
  species CaB in compartment = 2596.548;
  species Cabuff in compartment = 0;
  species Cbuff in compartment = 0;
  species Cbuffslow in compartment = 0;
  species Caextbuffslow in compartment = 0;
  species Cam in compartment = 9013.023;
  species CamCa2C in compartment = 256.764;
  species CamCa2N in compartment = 39.041;

  // Parameters:
  kon_1 = 3.2e-5 per_nM_per_ms;
  koff_1 = 0.0012 per_ms;
  kon_2 = 0.0003 per_ms;
  koff_2 = 0 per_nM_per_ms;
  kon_3 = 3.2e-5 per_nM_per_ms;
  koff_3 = 0.0012 per_ms;
  kon_4 = 0.0003 per_ms;
  koff_4 = 0 per_nM_per_ms;
  kon_5 = 0.00015 per_nM_per_ms;
  koff_5 = 0.016 per_ms;
  kon_6 = 0.004 per_ms;
  koff_6 = 0 per_nM_per_ms;
  kon_7 = 0.00015 per_nM_per_ms;
  koff_7 = 0.016 per_ms;
  kon_8 = 0.004 per_ms;
  koff_8 = 0 per_nM_per_ms;
  kon_9 = 9.42863e-6 per_nM_per_ms;
  koff_9 = 0.0012 per_ms;
  kon_10 = 0.0003 per_ms;
  koff_10 = 0 per_nM_per_ms;
  kon_11 = 9.42863e-6 per_nM_per_ms;
  koff_11 = 0.0012 per_ms;
  kon_12 = 0.0003 per_ms;
  koff_12 = 0 per_nM_per_ms;
  kon_13 = 1.9168e-6 per_nM_per_ms;
  koff_13 = 0.024 per_ms;
  kon_14 = 0.006 per_ms;
  koff_14 = 0 per_nM_per_ms;
  kon_15 = 1.9168e-6 per_nM_per_ms;
  koff_15 = 0.024 per_ms;
  kon_16 = 0.006 per_ms;
  koff_16 = 0 per_nM_per_ms;
  kon_17 = 6e-5 per_nM_per_ms;
  koff_17 = 0.001 per_ms;
  kon_18 = 6e-6 per_nM_per_ms;
  koff_18 = 0.0005 per_ms;
  kon_19 = 1.21e-7 per_nM_per_ms;
  koff_19 = 0.0001452 per_ms;
  kon_20 = 1.2e-6 per_nM_per_ms;
  koff_20 = 0.00096 per_ms;
  kon_21 = 0.00024 per_ms;
  koff_21 = 0 per_nM_per_ms;
  kon_22 = 0.002041 per_nM_per_ms;
  koff_22 = 0.08 per_ms;
  kon_23 = 0.02 per_ms;
  koff_23 = 0 per_nM_per_ms;
  kon_24 = 0.1 per_ms;
  koff_24 = 0 per_ms;
  kon_25 = 0.0004 per_nM_per_ms;
  koff_25 = 0.16 per_ms;
  kon_26 = 0.04 per_ms;
  koff_26 = 0 per_nM_per_ms;
  kon_27 = 0.1 per_ms;
  koff_27 = 0 per_ms;
  kon_28 = 1e-6 per_nM_per_ms;
  koff_28 = 0.0002 per_ms;
  kon_29 = 1.01e-5 per_nM_per_ms;
  koff_29 = 8e-5 per_ms;
  kon_30 = 2e-5 per_ms;
  koff_30 = 0 per_nM_per_ms;
  kon_31 = 0.0002 per_nM_per_ms;
  koff_31 = 0.2 per_ms;
  kon_32 = 0.002 per_ms;
  koff_32 = 0 per_nM_per_ms;
  kon_33 = 3.2e-6 per_nM_per_ms;
  koff_33 = 0.0032 per_ms;
  kon_34 = 0.0008 per_ms;
  koff_34 = 0 per_nM_per_ms;
  kon_35 = 6.14e-6 per_nM_per_ms;
  koff_35 = 0.00614 per_ms;
  kon_36 = 0.00153 per_ms;
  koff_36 = 0 per_nM_per_ms;
  kon_37 = 0.0003067258 per_nM_per_ms;
  koff_37 = 0.05871516 per_ms;
  kon_38 = 0.000648433 per_ms;
  koff_38 = 0 per_nM_per_ms;
  kon_39 = 2.5e-5 per_ms;
  koff_39 = 2.5e-5 per_ms;
  kon_40 = 0.001 per_ms;
  koff_40 = 0 per_ms;
  kon_41 = 2.61e-7 per_nM_per_ms;
  koff_41 = 6e-5 per_ms;
  kon_42 = 3.5e-7 per_nM_per_ms;
  koff_42 = 0.0006 per_ms;
  kon_43 = 0.00024 per_ms;
  koff_43 = 2.55e-5 per_nM_per_ms;
  kon_45 = 2e-8 per_nM_per_ms;
  koff_45 = 0.0005 per_ms;
  kon_46 = 5.9e-6 per_nM_per_ms;
  koff_46 = 0.0005 per_ms;
  kon_47 = 0.0054 per_ms;
  koff_47 = 0 per_nM_per_ms;
  kon_48 = 2.16e-5 per_nM_per_ms;
  koff_48 = 0.06895 per_ms;
  kon_49 = 0.017233 per_ms;
  koff_49 = 0 per_nM_per_ms;
  kon_50 = 0.0001 per_nM_per_ms;
  koff_50 = 0 per_ms;
  kon_51 = 1e-5 per_nM_per_ms;
  koff_51 = 0 per_ms;
  kon_52 = 5e-5 per_nM_per_ms;
  koff_52 = 0.007 per_ms;
  kon_53 = 0.0035 per_ms;
  koff_53 = 0 per_nM_per_ms;
  kon_54 = 1.68e-5 per_nM_per_ms;
  koff_54 = 0.0112 per_ms;
  kon_55 = 0.0056 per_ms;
  koff_55 = 0 per_nM_per_ms;
  kon_56 = 1.5e-6 per_nM_per_ms;
  koff_56 = 0.0011 per_ms;
  kon_57 = 0.0011 per_ms;
  koff_57 = 0 per_nM_per_ms;
  kon_58 = 2.8e-5 per_nM_per_ms;
  koff_58 = 0.0196 per_ms;
  kon_59 = 2e-5 per_nM_per_ms;
  koff_59 = 1 per_ms;
  kon_60 = 6e-6 per_nM_per_ms;
  koff_60 = 0.0091 per_ms;
  kon_61 = 0.0001 per_nM_per_ms;
  koff_61 = 1 per_ms;
  kon_62 = 0.0001 per_nM_per_ms;
  koff_62 = 1 per_ms;
  kon_63 = 6e-6 per_nM_per_ms;
  koff_63 = 0.0091 per_ms;
  kon_64 = 1e-5 per_nM_per_ms;
  koff_64 = 0.0015 per_ms;
  kon_65 = 3.831197e-10 per_nM_per_ms;
  koff_65 = 0 per_nM_per_ms;
  kon_66 = 3.557921e-13 per_nM2_per_ms;
  koff_66 = 0 per_nM2_per_ms;
  kon_67 = 2.236948e-16 per_nM3_per_ms;
  koff_67 = 0 per_nM3_per_ms;
  kon_68 = 1.104501e-18 per_nM3_per_ms;
  koff_68 = 0 per_nM3_per_ms;
  kon_69 = 3.033064e-13 per_nM2_per_ms;
  koff_69 = 0 per_nM2_per_ms;
  kon_70 = 2.393995e-13 per_nM3_per_ms;
  koff_70 = 0 per_nM3_per_ms;
  kon_71 = 8e-7 per_ms;
  koff_71 = 1e-5 per_nM_per_ms;
  kon_72 = 4e-8 per_nM_per_ms;
  koff_72 = 0.00034 per_ms;
  kon_73 = 8.6e-5 per_ms;
  koff_73 = 0 per_nM_per_ms;
  kon_74 = 4e-8 per_nM_per_ms;
  koff_74 = 0.00034 per_ms;
  kon_75 = 8.6e-5 per_ms;
  koff_75 = 0 per_nM_per_ms;
  kon_76 = 1e-6 per_nM_per_ms;
  koff_76 = 1.1e-6 per_ms;
  kon_77 = 2.8e-5 per_nM_per_ms;
  koff_77 = 0.036 per_ms;
  kon_78 = 1.8857251e-5 per_nM_per_ms;
  koff_78 = 0.0024 per_ms;
  kon_79 = 0.0006 per_ms;
  koff_79 = 0 per_nM_per_ms;
  kon_80 = 1.8857251e-5 per_nM_per_ms;
  koff_80 = 0.0024 per_ms;
  kon_81 = 0.0006 per_ms;
  koff_81 = 0 per_nM_per_ms;
  kon_82 = 6.28575e-6 per_nM_per_ms;
  koff_82 = 0.0008 per_ms;
  kon_83 = 0.0002 per_ms;
  koff_83 = 0 per_nM_per_ms;
  kon_84 = 6.28575e-6 per_nM_per_ms;
  koff_84 = 0.0008 per_ms;
  kon_85 = 0.0002 per_ms;
  koff_85 = 0 per_nM_per_ms;
  kon_86 = 6e-5 per_nM_per_ms;
  koff_86 = 0.001 per_ms;
  kon_87 = 2e-5 per_ms;
  koff_87 = 0.0005 per_ms;
  kon_88 = 6e-6 per_nM_per_ms;
  koff_88 = 0.0005 per_ms;
  kon_89 = 6e-5 per_nM_per_ms;
  koff_89 = 0.000924 per_ms;
  kon_90 = 1.9e-6 per_nM_per_ms;
  koff_90 = 8e-5 per_ms;
  kon_91 = 2e-5 per_ms;
  koff_91 = 0 per_nM_per_ms;
  kon_92 = 0.001 per_ms;
  kon_93 = 2e-7 per_nM_per_ms;
  koff_93 = 0.0001 per_ms;
  kon_94 = 8e-6 per_nM_per_ms;
  koff_94 = 0.000128 per_ms;
  kon_95 = 3.2e-5 per_ms;
  koff_95 = 0 per_nM_per_ms;
  kon_96 = 0.0002 per_ms;
  koff_96 = 0 per_ms;
  kon_97 = 2.5e-7 per_nM_per_ms;
  koff_97 = 1.68e-5 per_ms;
  kon_98 = 0.005 per_nM_per_ms;
  koff_98 = 0.0001 per_ms;
  kon_99 = 1.98e-5 per_nM_per_ms;
  koff_99 = 0.0008 per_ms;
  kon_100 = 0.0002 per_ms;
  koff_100 = 0 per_nM_per_ms;
  kon_101 = 1.953e-5 per_nM_per_ms;
  koff_101 = 0.04 per_ms;
  kon_102 = 0.01 per_ms;
  koff_102 = 0 per_nM2_per_ms;
  kon_103 = 0.001 per_ms;
  koff_103 = 0 per_ms;
  kon_104 = 8.2e-7 per_nM_per_ms;
  koff_104 = 0.00082 per_ms;
  kon_105 = 0.000205 per_ms;
  koff_105 = 0 per_nM_per_ms;
  kon_106 = 1.12e-6 per_nM_per_ms;
  koff_106 = 0.001112 per_ms;
  kon_107 = 0.000279 per_ms;
  koff_107 = 0 per_nM_per_ms;
  kon_108 = 4.95e-5 per_nM_per_ms;
  koff_108 = 0.04 per_ms;
  kon_109 = 0.01 per_ms;
  koff_109 = 0 per_nM_per_ms;

  // Reactions:
  r1: ppMEK + ERK => ppMEKERK; compartment*(kon_1*ppMEK*ERK - koff_1*ppMEKERK);
  r2: ppMEKERK => pERK + ppMEK; compartment*(kon_2*ppMEKERK - koff_2*pERK*ppMEK);
  r3: ppMEK + pERK => ppMEKpERK; compartment*(kon_3*ppMEK*pERK - koff_3*ppMEKpERK);
  r4: ppMEKpERK => ppERK + ppMEK; compartment*(kon_4*ppMEKpERK - koff_4*ppERK*ppMEK);
  r5: ppERK + MKP1 => ppERKMKP1; compartment*(kon_5*ppERK*MKP1 - koff_5*ppERKMKP1);
  r6: ppERKMKP1 => pERK + MKP1; compartment*(kon_6*ppERKMKP1 - koff_6*pERK*MKP1);
  r7: pERK + MKP1 => pERKMKP1; compartment*(kon_7*pERK*MKP1 - koff_7*pERKMKP1);
  r8: pERKMKP1 => ERK + MKP1; compartment*(kon_8*pERKMKP1 - koff_8*ERK*MKP1);
  r9: MEK + bRafRap1 => bRafRap1MEK; compartment*(kon_9*MEK*bRafRap1 - koff_9*bRafRap1MEK);
  r10: bRafRap1MEK => pMEK + bRafRap1; compartment*(kon_10*bRafRap1MEK - koff_10*pMEK*bRafRap1);
  r11: pMEK + bRafRap1 => bRafRap1pMEK; compartment*(kon_11*pMEK*bRafRap1 - koff_11*bRafRap1pMEK);
  r12: bRafRap1pMEK => ppMEK + bRafRap1; compartment*(kon_12*bRafRap1pMEK - koff_12*ppMEK*bRafRap1);
  r13: ppMEK + PP2A => ppMEKPP2A; compartment*(kon_13*ppMEK*PP2A - koff_13*ppMEKPP2A);
  r14: ppMEKPP2A => pMEK + PP2A; compartment*(kon_14*ppMEKPP2A - koff_14*pMEK*PP2A);
  r15: pMEK + PP2A => pMEKPP2A; compartment*(kon_15*pMEK*PP2A - koff_15*pMEKPP2A);
  r16: pMEKPP2A => MEK + PP2A; compartment*(kon_16*pMEKPP2A - koff_16*MEK*PP2A);
  r17: Rap1GTP + bRaf => bRafRap1; compartment*(kon_17*Rap1GTP*bRaf - koff_17*bRafRap1);
  r18: Rap1GTP + Raf1 => Raf1Rap1; compartment*(kon_18*Rap1GTP*Raf1 - koff_18*Raf1Rap1);
  r19: Epac + cAMP => EpacAMP; compartment*(kon_19*Epac*cAMP - koff_19*EpacAMP);
  r20: EpacAMP + Rap1GDP => EpacRap1; compartment*(kon_20*EpacAMP*Rap1GDP - koff_20*EpacRap1);
  r21: EpacRap1 => EpacAMP + Rap1GTP; compartment*(kon_21*EpacRap1 - koff_21*EpacAMP*Rap1GTP);
  r22: PKAc + Src => PKAcSrc; compartment*(kon_22*PKAc*Src - koff_22*PKAcSrc);
  r23: PKAcSrc => PKAc + pSrc; compartment*(kon_23*PKAcSrc - koff_23*PKAc*pSrc);
  r24: pSrc => Src; compartment*(kon_24*pSrc - koff_24*Src);
  r25: Cbl + pSrc => CblpSrc; compartment*(kon_25*Cbl*pSrc - koff_25*CblpSrc);
  r26: CblpSrc => pCbl + pSrc; compartment*(kon_26*CblpSrc - koff_26*pCbl*pSrc);
  r27: pCbl => Cbl; compartment*(kon_27*pCbl - koff_27*Cbl);
  r28: CRKC3G + pCbl => CRKC3GpCbl; compartment*(kon_28*CRKC3G*pCbl - koff_28*CRKC3GpCbl);
  r29: Rap1GDP + CRKC3GpCbl => CRKC3GpCblRap1; compartment*(kon_29*Rap1GDP*CRKC3GpCbl - koff_29*CRKC3GpCblRap1);
  r30: CRKC3GpCblRap1 => Rap1GTP + CRKC3GpCbl; compartment*(kon_30*CRKC3GpCblRap1 - koff_30*Rap1GTP*CRKC3GpCbl);
  r31: Rap1GTP + rap1Gap => Rap1GTPGap; compartment*(kon_31*Rap1GTP*rap1Gap - koff_31*Rap1GTPGap);
  r32: Rap1GTPGap => rap1Gap + Rap1GDP; compartment*(kon_32*Rap1GTPGap - koff_32*rap1Gap*Rap1GDP);
  r33: Rap1GTP + SynGap => Rap1SynGap; compartment*(kon_33*Rap1GTP*SynGap - koff_33*Rap1SynGap);
  r34: Rap1SynGap => SynGap + Rap1GDP; compartment*(kon_34*Rap1SynGap - koff_34*SynGap*Rap1GDP);
  r35: Rap1GTP + pSynGap => Rap1pSynGap; compartment*(kon_35*Rap1GTP*pSynGap - koff_35*Rap1pSynGap);
  r36: Rap1pSynGap => pSynGap + Rap1GDP; compartment*(kon_36*Rap1pSynGap - koff_36*pSynGap*Rap1GDP);
  r37: CKpCamCa4 + SynGap => CKpCamCa4SynGap; compartment*(kon_37*CKpCamCa4*SynGap - koff_37*CKpCamCa4SynGap);
  r38: CKpCamCa4SynGap => pSynGap + CKpCamCa4; compartment*(kon_38*CKpCamCa4SynGap - koff_38*pSynGap*CKpCamCa4);
  r39: pSynGap => pSynden; compartment*(kon_39*pSynGap - koff_39*pSynden);
  r40: pSynGap => SynGap; compartment*(kon_40*pSynGap - koff_40*SynGap);
  r41: PKA + cAMP => PKAcAMP2; compartment*(kon_41*PKA*cAMP - koff_41*PKAcAMP2);
  r42: PKAcAMP2 + cAMP => PKAcAMP4; compartment*(kon_42*PKAcAMP2*cAMP - koff_42*PKAcAMP4);
  r43: PKAcAMP4 => PKAr + PKAc; compartment*(kon_43*PKAcAMP4 - koff_43*PKAr*PKAc);
  r45: PDE2 + cAMP => PDE2cAMP; compartment*(kon_45*PDE2*cAMP - koff_45*PDE2cAMP);
  r46: PDE2cAMP + cAMP => PDE2cAMP2; compartment*(kon_46*PDE2cAMP*cAMP - koff_46*PDE2cAMP2);
  r47: PDE2cAMP2 => PDE2cAMP + AMP; compartment*(kon_47*PDE2cAMP2 - koff_47*PDE2cAMP*AMP);
  r48: PDE4 + cAMP => PDE4cAMP; compartment*(kon_48*PDE4*cAMP - koff_48*PDE4cAMP);
  r49: PDE4cAMP => PDE4 + AMP; compartment*(kon_49*PDE4cAMP - koff_49*PDE4*AMP);
  r50: Ca + Cbuff => Cabuff; compartment*(kon_50*Ca*Cbuff - koff_50*Cabuff);
  r51: Cbuffslow + Caext => Caextbuffslow; compartment*(kon_51*Cbuffslow*Caext - koff_51*Caextbuffslow);
  r52: Ca + pmca => pmcaCa; compartment*(kon_52*Ca*pmca - koff_52*pmcaCa);
  r53: pmcaCa => pmca + Caext; compartment*(kon_53*pmcaCa - koff_53*pmca*Caext);
  r54: Ca + ncx => ncxCa; compartment*(kon_54*Ca*ncx - koff_54*ncxCa);
  r55: ncxCa => ncx + Caext; compartment*(kon_55*ncxCa - koff_55*ncx*Caext);
  r56: Caext + Leak => CaextLeak; compartment*(kon_56*Caext*Leak - koff_56*CaextLeak);
  r57: CaextLeak => Ca + Leak; compartment*(kon_57*CaextLeak - koff_57*Ca*Leak);
  r58: Ca + Calbin => CalbinC; compartment*(kon_58*Ca*Calbin - koff_58*CalbinC);
  r59: Ca + CB => CaB; compartment*(kon_59*Ca*CB - koff_59*CaB);
  r60: Cam + Ca => CamCa2C; compartment*(kon_60*Cam*Ca - koff_60*CamCa2C);
  r61: CamCa2C + Ca => CamCa4; compartment*(kon_61*CamCa2C*Ca - koff_61*CamCa4);
  r62: Cam + Ca => CamCa2N; compartment*(kon_62*Cam*Ca - koff_62*CamCa2N);
  r63: CamCa2N + Ca => CamCa4; compartment*(kon_63*CamCa2N*Ca - koff_63*CamCa4);
  r64: CamCa4 + CK => CKCamCa4; compartment*(kon_64*CamCa4*CK - koff_64*CKCamCa4);
  r65: CKCamCa4 => CKCamCa4 + CKpCamCa4; compartment*(kon_65*CKCamCa4^2 - koff_65*CKCamCa4*CKpCamCa4);
  r66: CKCamCa4 => CKCamCa4 + CKpCamCa4; compartment*(kon_66*CKCamCa4^3 - koff_66*CKCamCa4*CKpCamCa4);
  r67: CKCamCa4 => CKCamCa4 + CKpCamCa4; compartment*(kon_67*CKCamCa4^4 - koff_67*CKCamCa4*CKpCamCa4);
  r68: CKpCamCa4 + CKCamCa4 => CKCamCa4 + CKpCamCa4; compartment*(kon_68*CKpCamCa4^2*CKCamCa4^2 - koff_68*CKCamCa4*CKpCamCa4);
  r69: CKpCamCa4 + CKCamCa4 => CKpCamCa4; compartment*(kon_69*CKpCamCa4^2*CKCamCa4 - koff_69*CKpCamCa4);
  r70: CKpCamCa4 + CKCamCa4 => CKpCamCa4 + CKCamCa4; compartment*(kon_70*CKpCamCa4^2*CKCamCa4^2 - koff_70*CKpCamCa4*CKCamCa4);
  r71: CKpCamCa4 => CamCa4 + CKp; compartment*(kon_71*CKpCamCa4 - koff_71*CamCa4*CKp);
  r72: CKp + PP1 => CKpPP1; compartment*(kon_72*CKp*PP1 - koff_72*CKpPP1);
  r73: CKpPP1 => PP1 + CK; compartment*(kon_73*CKpPP1 - koff_73*PP1*CK);
  r74: CKpCamCa4 + PP1 => CKpCamCa4PP1; compartment*(kon_74*CKpCamCa4*PP1 - koff_74*CKpCamCa4PP1);
  r75: CKpCamCa4PP1 => PP1 + CKCamCa4; compartment*(kon_75*CKpCamCa4PP1 - koff_75*PP1*CKCamCa4);
  r76: Ip35 + PP1 => Ip35PP1; compartment*(kon_76*Ip35*PP1 - koff_76*Ip35PP1);
  r77: Ng + Cam => NgCam; compartment*(kon_77*Ng*Cam - koff_77*NgCam);
  r78: MEK + dRaf1Ras => dRaf1RasMEK; compartment*(kon_78*MEK*dRaf1Ras - koff_78*dRaf1RasMEK);
  r79: dRaf1RasMEK => pMEK + dRaf1Ras; compartment*(kon_79*dRaf1RasMEK - koff_79*pMEK*dRaf1Ras);
  r80: pMEK + dRaf1Ras => dRaf1RaspMEK; compartment*(kon_80*pMEK*dRaf1Ras - koff_80*dRaf1RaspMEK);
  r81: dRaf1RaspMEK => ppMEK + dRaf1Ras; compartment*(kon_81*dRaf1RaspMEK - koff_81*ppMEK*dRaf1Ras);
  r82: MEK + bRafRas => bRafRasMEK; compartment*(kon_82*MEK*bRafRas - koff_82*bRafRasMEK);
  r83: bRafRasMEK => pMEK + bRafRas; compartment*(kon_83*bRafRasMEK - koff_83*pMEK*bRafRas);
  r84: pMEK + bRafRas => bRafRaspMEK; compartment*(kon_84*pMEK*bRafRas - koff_84*bRafRaspMEK);
  r85: bRafRaspMEK => ppMEK + bRafRas; compartment*(kon_85*bRafRaspMEK - koff_85*ppMEK*bRafRas);
  r86: RasGTP + Raf1 => Raf1Ras; compartment*(kon_86*RasGTP*Raf1 - koff_86*Raf1Ras);
  r87: Raf1Ras => dRaf1Ras; compartment*(kon_87*Raf1Ras - koff_87*dRaf1Ras);
  r88: RasGTP + bRaf => bRafRas; compartment*(kon_88*RasGTP*bRaf - koff_88*bRafRas);
  r89: CamCa4 + RasGRF => CamCa4GRF; compartment*(kon_89*CamCa4*RasGRF - koff_89*CamCa4GRF);
  r90: CamCa4GRF + RasGDP => CamCa4GRFRas; compartment*(kon_90*CamCa4GRF*RasGDP - koff_90*CamCa4GRFRas);
  r91: CamCa4GRFRas => CamCa4GRF + RasGTP; compartment*(kon_91*CamCa4GRFRas - koff_91*CamCa4GRF*RasGTP);
  r93: Gbg + Src => SrcGbg; compartment*(kon_93*Gbg*Src - koff_93*SrcGbg);
  r94: SrcGbg + Shc => SrcGbgShc; compartment*(kon_94*SrcGbg*Shc - koff_94*SrcGbgShc);
  r95: SrcGbgShc => pShc + SrcGbg; compartment*(kon_95*SrcGbgShc - koff_95*pShc*SrcGbg);
  r96: pShc => Shc; compartment*(kon_96*pShc - koff_96*Shc);
  r97: Grb2 + Sos => Grb2Sos; compartment*(kon_97*Grb2*Sos - koff_97*Grb2Sos);
  r98: Grb2Sos + pShc => pShcGrb2Sos; compartment*(kon_98*Grb2Sos*pShc - koff_98*pShcGrb2Sos);
  r99: pShcGrb2Sos + RasGDP => pShcGrb2SosRas; compartment*(kon_99*pShcGrb2Sos*RasGDP - koff_99*pShcGrb2SosRas);
  r100: pShcGrb2SosRas => RasGTP + pShcGrb2Sos; compartment*(kon_100*pShcGrb2SosRas - koff_100*RasGTP*pShcGrb2Sos);
  r101: pShcGrb2Sos + ppERK => ppERKpShcGrb2Sos; compartment*(kon_101*pShcGrb2Sos*ppERK - koff_101*ppERKpShcGrb2Sos);
  r102: ppERKpShcGrb2Sos => ppERK + pSos + pShcGrb2; compartment*(kon_102*ppERKpShcGrb2Sos - koff_102*ppERK*pSos*pShcGrb2);
  r103: pSos => Sos; compartment*(kon_103*pSos - koff_103*Sos);
  r104: RasGTP + SynGap => RasSynGap; compartment*(kon_104*RasGTP*SynGap - koff_104*RasSynGap);
  r105: RasSynGap => SynGap + RasGDP; compartment*(kon_105*RasSynGap - koff_105*SynGap*RasGDP);
  r106: RasGTP + pSynGap => RaspSynGap; compartment*(kon_106*RasGTP*pSynGap - koff_106*RaspSynGap);
  r107: RaspSynGap => pSynGap + RasGDP; compartment*(kon_107*RaspSynGap - koff_107*pSynGap*RasGDP);
  r108: RasGTP + rasGap => RasGTPGap; compartment*(kon_108*RasGTP*rasGap - koff_108*RasGTPGap);
  r109: RasGTPGap => rasGap + RasGDP; compartment*(kon_109*RasGTPGap - koff_109*rasGap*RasGDP);

  // Unit definitions:
  unit per_second = 1 / second;
  unit ms = 1e-3 second;
  unit nM = 1e-9 mole;
  unit per_ms = 1 / (1e-3 second);
  unit per_nM_per_ms = 1 / (1e-9 mole * 1e-3 second);
  unit per_nM2_per_ms = 1 / ((1e-9 mole)^2 * 1e-3 second);
  unit per_nM3_per_ms = 1 / ((1e-9 mole)^3 * 1e-3 second);
  unit per_nM4_per_ms = 1 / ((1e-9 mole)^3 * 1e-3 second);
end
